*Node, NSET=Nall
1, 0, 0, 0
2, 0, 0, 10
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*Element, TYPE=C3D10, ELSET=Eall
1, 97, 174, 99, 95, 197, 196, 108, 112, 198, 114,
2, 123, 120, 73, 74, 130, 200, 199, 201, 202, 76,
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

***********************************************************
** Element sets for materials
** written by write_material_element_sets function
*ELSET,ELSET=MechanicalMaterial
Eall

***********************************************************
** Node set for fixed constraint
** written by write_fixed_node_sets function
*NSET,NSET=FemConstraintFixed
1,
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
***********************************************************
** Node sets for loads
** written by write_load_node_sets function
*NSET,NSET=FemConstraintForce

***********************************************************
** Materials
** written by write_materials function
** Young's modulus unit is MPa = N/mm2
*MATERIAL, NAME=Test Material
*ELASTIC
20000 ,
0.360
*DENSITY
1e-09 ,
*SOLID SECTION, ELSET=MechanicalMaterial, MATERIAL=Test Material

***********************************************************
** One step is needed to calculate the mechanical analysis of FreeCAD
** loads are applied quasi-static, means without involving the time dimension
** written by write_step_begin function
*STEP
*STATIC

***********************************************************
** Constaints
** written by write_constraints_fixed function
*BOUNDARY
FemConstraintFixed,1
FemConstraintFixed,2
FemConstraintFixed,3


***********************************************************
** Node loads
** written by write_constraints_force function
** FemConstraintForce
*CLOAD
** node loads on element face: Box.Face3


***********************************************************
** Element + CalculiX face + load in [MPa]
** written by write_face_load function
*DLOAD
** Load on face Face4
3,P1,-10.0
6,P4,-10.0
15,P1,-10.0
18,P1,-10.0
19,P1,-10.0
28,P2,-10.0
32,P3,-10.0
34,P2,-10.0
40,P4,-10.0
45,P1,-10.0
46,P2,-10.0
49,P2,-10.0
50,P1,-10.0
71,P2,-10.0
98,P2,-10.0
105,P3,-10.0

***********************************************************
** Outputs --> frd file
** written by write_outputs_types function
*NODE FILE
U
*EL FILE
S, E
** outputs --> dat file
*NODE PRINT , NSET=Nall
U
*EL PRINT , ELSET=Eall
S

***********************************************************
** written by write_step_end function
*END STEP

***********************************************************
** CalculiX Input file
** written by write_footer function
**   written by    --> FreeCAD 0.16.5321 +17 (Git)
**   written on    --> Sun Aug  2 12:59:37 2015
**   file name     -->
**   analysis name --> MechanicalAnalysis
**
**
**
**   Units
**
**   Geometry (mesh data)        --> mm
**   Materials (Young's modulus) --> N/mm2 = MPa
**   Loads (nodal loads)         --> N
**
