*Node, NSET=Nall
1, 0, 0, 0
2, 0, 0, 10
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*Element, TYPE=C3D10, ELSET=Eall
633, 95, 98, 47, 196, 103, 197, 198, 200, 199, 201,
634, 147, 121, 145, 196, 203, 202, 161, 205, 204, 206,
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

***********************************************************
** Element sets for materials
** written by write_material_element_sets function
*ELSET,ELSET=MechanicalMaterial
Eall

***********************************************************
** Node set for fixed constraint
** written by write_fixed_node_sets function
*NSET,NSET=FemConstraintFixed
1,
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
***********************************************************
** Node sets for loads
** written by write_load_node_sets function

***********************************************************
** Materials
** written by write_materials function
** Young's modulus unit is MPa = N/mm2
*MATERIAL, NAME=Steel
*ELASTIC
200000 ,
0.300
*DENSITY
7.900e-09,
*SOLID SECTION, ELSET=MechanicalMaterial, MATERIAL=Steel

***********************************************************
** One step is needed to calculate the mechanical analysis of FreeCAD
** loads are applied quasi-static, means without involving the time dimension
** written by write_step_begin function
*STEP
*STATIC

***********************************************************
** Constaints
** written by write_constraints_fixed function
*BOUNDARY
FemConstraintFixed,1
FemConstraintFixed,2
FemConstraintFixed,3


***********************************************************
** Frequency analysis
** written by write_frequency function
*FREQUENCY
10,0.0,1000000.0

***********************************************************
** Outputs --> frd file
** written by write_outputs_types function
*NODE FILE
U
*EL FILE
S, E
** outputs --> dat file
*NODE PRINT , NSET=Nall
U
*EL PRINT , ELSET=Eall
S

***********************************************************
** written by write_step_end function
*END STEP

***********************************************************
** CalculiX Input file
** written by write_footer function
**   written by    --> FreeCAD 0.16.5490 (Git)
**   written on    --> Fri Sep 11 10:37:51 2015
**   file name     --> cube_10x10x10_no_1.fcstd
**   analysis name --> MechanicalAnalysis
**
**
**
**   Units
**
**   Geometry (mesh data)        --> mm
**   Materials (Young's modulus) --> N/mm2 = MPa
**   Loads (nodal loads)         --> N
**
